*HEADING
 TEST OF NONLINEAR USER ELEMENTS
**
*Node
      1,       -1800.,         333.
      2,       -1800.,          33.
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**
** Defining user element U1
*User element,nodes=8,type=U1,properties=11,coordinates=2,VARIABLES=1080,Unsymm
 1, 2, 11
**
*ELEMENT, TYPE=U1, ELSET=ALLELEMENT
  1,    1,   25,  430,   56, 1855, 1856, 1857, 1858
  2,   25,   26,  431,  430, 1859, 1860, 1861, 1856
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**
*Uel property, elset=ALLELEMENT
 25000, 0.2, 10, 0.000112, 20
**
** Importing connectivity for UMAT element
*Element, TYPE=U1, elset=ALLELEMENT1
1019, 1286,  260,   20,  261, 3982, 3985, 3986, 3983
1470, 1672,  349,  350, 1673, 4911, 4914, 4915, 4912
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*Uel property, elset=ALLELEMENT1
 20000, 0.2, 10, 0.000112, 20
**
** Importing connectivity for UMAT element
*Element, TYPE=CPS8, elset=umatelemX
10001,    1,   25,  430,   56, 1855, 1856, 1857, 1858
10002,   25,   26,  431,  430, 1859, 1860, 1861, 1856
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*Solid Section, elset=umatelemX, material=umatelemX1
 1.0
*Material, name=umatelemX1
*Depvar
 120,
*User Material, constants=2
 1.0e-11,0.2
**
** Importing connectivity for UMAT element
*Element, TYPE=T2D2, elset=umatelemS
20001	,	12	,	207
20002	,	207	,	205
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*SolidSection, elset=umatelemS, material=umatelemS
 1.6
*Material, name=umatelemS
*Elastic
210000., 0.3
*Plastic
300.,0.
** ----------------------------------------------------------------
**
** Sets for Application of BC
*Nset, nset=symm1
   21,   22,   23,  288,  289,  290
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*Nset, nset=load1
 15,
*Nset, nset=bot1
 6,
**
*Nset, nset=load1Z
 11, 15, 19, 235, 236, 257, 258, 3777, 3808, 3839, 3884, 3915, 3946
*Nset, nset=bot1Z
 5, 6, 9, 58, 59, 79, 80, 1967, 1971, 1975, 2072, 2076, 2080
**
** Constraint: Constraint-1
*MPC
BEAM, bot1Z, bot1
** Constraint: Constraint-2
*MPC
BEAM, load1Z, load1
** ----------------------------------------------------------------
**
** STEP: Step-1
**
*Step, name=Step-1, nlgeom=NO, inc=100000
*Static
0.001, 14., 1e-07, 1.
**
** CONTROLS
**
*Controls, reset
*Controls, parameters=field, field=displacement
50., 0.1, , , 0.2, , ,
*Controls, parameters=field, field=hydrostatic fluid pressure
50., 0.1, , , 0.2, , ,
*Controls, parameters=field, field=rotation
50., 1., , , 0.2, , ,
*Controls, parameters=field, field=electrical potential
50., 0.1, , , 0.2, , ,
**
*Boundary
 symm1, 1, 1, 0
**
*Boundary
 bot1, 2, 2, 0
**
** OUTPUT REQUESTS
**
*Restart, write, frequency=0
**
** FIELD OUTPUT: F-Output-1
**
*Output, field
*Node Output
RF, U
**
** FIELD OUTPUT: F-Output-2
**
*Element Output, directions=YES
S, SDV
*End Step
** ----------------------------------------------------------------
**
** STEP: Step-2
**
*Step, name=Step-2, nlgeom=NO, inc=100000
*Static, stabilize=0.2, allsdtol=0.05, continue=NO
0.001, 20, 1e-07, 0.05
**
** CONTROLS
**
*Controls, reset
*Controls, parameters=field, field=displacement
100., 0.1, , , 0.2, , ,
*Controls, parameters=field, field=hydrostatic fluid pressure
100., 0.1, , , 0.2, , ,
*Controls, parameters=field, field=rotation
100., 1., , , 0.2, , ,
*Controls, parameters=field, field=electrical potential
100., 0.1, , , 0.2, , ,
**
*Boundary
 symm1, 1, 1, 0
**
*Boundary
 bot1, 2, 2, 0
**
*Boundary
 load1, 2, 2, -3
**
** OUTPUT REQUESTS
**
*Restart, write, frequency=0
**
** FIELD OUTPUT: F-Output-1
**
*Output, field
*Node Output
RF, U
**
** FIELD OUTPUT: F-Output-2
**
*Element Output, directions=YES
S, SDV
*End Step
